OpenVSP model (file version 5), 34 components.
Geometry view with OpenVSP parameter names; values to 6 digits, angles in degrees, lengths in the model's unit.
Overall bounding box: X_Min=0 X_Len=9.98741 Y_Min=-8.9325 Y_Len=17.865 Z_Min=-0.8 Z_Len=3.93008

Fuselage "fuselage"
  location (X Y Z) 0 0 0, rotation 0 0 0
  bounding box size 9 1.6 1.6
  Design: Length=9
  cross sections:
    n  XLocPercent  YLocPercent  ZLocPercent  shape
    0  0            0            0            point
    1  0.25         0            0            ellipse Ellipse_Height=1.38362 Ellipse_Width=1.38362
    2  0.5          0            0            ellipse Ellipse_Height=1.6 Ellipse_Width=1.6
    3  0.75         0            0            ellipse Ellipse_Height=1.38362 Ellipse_Width=1.38362
    4  1            0            0            point

Wing "wing"
  location (X Y Z) 3.24778 0 0.8, rotation 0 0 0
  symmetric about XZ
  bounding box size 1.89656 16.74 0.284608
  totals: TotalSpan=16.74 TotalProjectedSpan=16.74 TotalChord=1.3276 TotalArea=22.2239 TotalAR=12.6093 MAC=1.40888
  root: chord 1.89656, twist 0, NACA 4-series Camber=0 CamberLoc=0.2 ThickChord=0.15
  sections:
    n  Span  Root_Chord  Tip_Chord  Area    Sweep  Sweep_Location  Dihedral  Twist  Twist_Location  tip airfoil
    1  8.37  1.89656     0.758626   11.112  0      0               0         0      0.25            as above

Wing "htail"
  location (X Y Z) 7.75517 0 0.64, rotation 0 0 0
  symmetric about XZ
  bounding box size 1.85671 4.41387 0.138014
  totals: TotalSpan=4.41387 TotalProjectedSpan=4.41387 TotalChord=1.10347 TotalArea=4.87057 TotalAR=4 MAC=1.12646
  root: chord 1.37934, twist 0, NACA 4-series Camber=0 CamberLoc=0.2 ThickChord=0.1
  sections:
    n  Span     Root_Chord  Tip_Chord  Area     Sweep  Sweep_Location  Dihedral  Twist  Twist_Location  tip airfoil
    1  2.20694  1.37934     0.827601   2.43528  25     0               0         0      0.25            as above

Wing "vtail"
  location (X Y Z) 7.58123 0 0.64, rotation 90 0 0
  bounding box size 2.40618 0.207627 2.49008
  totals: TotalSpan=2.49008 TotalProjectedSpan=2.49008 TotalChord=1.66005 TotalArea=4.13365 TotalAR=1.5 MAC=1.69464
  root: chord 2.07506, twist 0, NACA 4-series Camber=0 CamberLoc=0.2 ThickChord=0.1
  sections:
    n  Span     Root_Chord  Tip_Chord  Area     Sweep  Sweep_Location  Dihedral  Twist  Twist_Location  tip airfoil
    1  2.49008  2.07506     1.24504    4.13365  25     0               0         0      0.25            as above

Pod "boom_R0"
  location (X Y Z) 0.747781 7.8075 0.95, rotation 0 0 0
  bounding box size 6.89656 0.5 0.5
  Design: FineRatio=27.5863 Length=6.89656

Pod "boom_R1"
  location (X Y Z) 0.747781 4.96625 0.95, rotation 0 0 0
  bounding box size 6.89656 0.5 0.5
  Design: FineRatio=27.5863 Length=6.89656

Pod "boom_R2"
  location (X Y Z) 0.747781 2.125 0.95, rotation 0 0 0
  bounding box size 6.89656 0.5 0.5
  Design: FineRatio=27.5863 Length=6.89656

Pod "boom_L0"
  location (X Y Z) 0.747781 -7.8075 0.95, rotation 0 0 0
  bounding box size 6.89656 0.5 0.5
  Design: FineRatio=27.5863 Length=6.89656

Pod "boom_L1"
  location (X Y Z) 0.747781 -4.96625 0.95, rotation 0 0 0
  bounding box size 6.89656 0.5 0.5
  Design: FineRatio=27.5863 Length=6.89656

Pod "boom_L2"
  location (X Y Z) 0.747781 -2.125 0.95, rotation 0 0 0
  bounding box size 6.89656 0.5 0.5
  Design: FineRatio=27.5863 Length=6.89656

Propeller "lift_R0_fwd"
  location (X Y Z) 1.87278 7.8075 0.95, rotation 0 90 0
  bounding box size 2.25 2.25 0
  Design: Diameter=2.25 NumBlade=3 Beta34=20 UseBeta34Flag=1 Feather=0 Rotate=0 Precone=0 ReverseFlag=0 FoldAngle=0 PropMode=2 AF=151.538 CLi=0.538798 Chord=0.177656 Solidity=0.169649 ConstructXoC=0.5 FeatherAxisXoC=0.5 FeatherOffsetXoC=0
  cross sections:
    n  RadiusFrac  shape
    0  0.2         ellipse Ellipse_Height=0.045 Ellipse_Width=0.09
    1  0.4         NACA 16-series Chord=0.187031 IdealCl=0.7 ThickChord=0.144074
    2  1           NACA 16-series Chord=0.14625 IdealCl=0.2 ThickChord=0.03
  Chord along r/R (cubic Bezier): 0.2: 0.08, 0.333333: 0.15, 0.466667: 0.2, 0.6: 0.2, 0.716667: 0.2, 0.833333: 0.2, 0.95: 0.2, 0.966667: 0.2, 0.983333: 0.2, 1: 0.13
  Twist along r/R (PCHIP): 0.2: 46.75, 0.75: 20, 1: 13
  Thick along r/R (cubic Bezier): 0.2: 0.5, 0.233333: 0.3, 0.266667: 0.225, 0.3: 0.2, 0.4: 0.125, 0.5: 0.115, 0.6: 0.1, 0.733333: 0.075, 0.866667: 0.055, 1: 0.03
  CLI along r/R (cubic Bezier): 0.2: 0, 0.266667: 0.7, 0.333333: 0.7, 0.4: 0.7, 0.466667: 0.7, 0.533333: 0.7, 0.6: 0.7, 0.733333: 0.7, 0.866667: 0.7, 1: 0.2

Auxiliary "lift_R0_fwd_tippath", child of "lift_R0_fwd"
  location (X Y Z) 1.87278 7.8075 0.95, rotation 0 90 0; relative location 0 0 0, rotation 0 0 0
  bounding box size 2.25 2.25 0.582343
  Design: AutoDiam=1 AuxiliaryGeomType=0 BladeLength=1 BladeRootRadius=0.1 BogieTheta=0 CCEMainGearOffset=0 CCEUnits=3 CGRadius=1 ContactPt1_ClearanceMode=0 ContactPt1_GearMode=0 ContactPt1_Isymm=0 ContactPt1_KRetract=0 ContactPt1_SuspensionMode=0 ContactPt1_TireMode=0 ContactPt2_Isymm=0 ContactPt2_SuspensionMode=0 ContactPt2_TireMode=0 ContactPt3_Isymm=0 ContactPt3_SuspensionMode=0 ContactPt3_TireMode=0 Diameter=2.25 DiskRadius=2 FlapRadiusFract=0 FragLength=1 ReleaseAngle=0 RollTheta=0 RootLength=0 RootOffset=0.5 RotDir=0 RotorFragmentMode=0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

Propeller "lift_R0_aft"
  location (X Y Z) 6.51935 7.8075 0.95, rotation 0 90 0
  bounding box size 2.25 2.25 0
  Design: Diameter=2.25 NumBlade=3 Beta34=20 UseBeta34Flag=1 Feather=0 Rotate=0 Precone=0 ReverseFlag=0 FoldAngle=0 PropMode=2 AF=151.538 CLi=0.538798 Chord=0.177656 Solidity=0.169649 ConstructXoC=0.5 FeatherAxisXoC=0.5 FeatherOffsetXoC=0
  cross sections:
    n  RadiusFrac  shape
    0  0.2         ellipse Ellipse_Height=0.045 Ellipse_Width=0.09
    1  0.4         NACA 16-series Chord=0.187031 IdealCl=0.7 ThickChord=0.144074
    2  1           NACA 16-series Chord=0.14625 IdealCl=0.2 ThickChord=0.03
  blade curves as in "lift_R0_fwd"

Auxiliary "lift_R0_aft_tippath", child of "lift_R0_aft"
  location (X Y Z) 6.51935 7.8075 0.95, rotation 0 90 0; relative location 0 0 0, rotation 0 0 0
  bounding box size 2.25 2.25 0.582343
  Design: AutoDiam=1 AuxiliaryGeomType=0 BladeLength=1 BladeRootRadius=0.1 BogieTheta=0 CCEMainGearOffset=0 CCEUnits=3 CGRadius=1 ContactPt1_ClearanceMode=0 ContactPt1_GearMode=0 ContactPt1_Isymm=0 ContactPt1_KRetract=0 ContactPt1_SuspensionMode=0 ContactPt1_TireMode=0 ContactPt2_Isymm=0 ContactPt2_SuspensionMode=0 ContactPt2_TireMode=0 ContactPt3_Isymm=0 ContactPt3_SuspensionMode=0 ContactPt3_TireMode=0 Diameter=2.25 DiskRadius=2 FlapRadiusFract=0 FragLength=1 ReleaseAngle=0 RollTheta=0 RootLength=0 RootOffset=0.5 RotDir=0 RotorFragmentMode=0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

Propeller "lift_R1_fwd"
  location (X Y Z) 1.87278 4.96625 0.95, rotation 0 90 0
  bounding box size 2.25 2.25 0
  Design: Diameter=2.25 NumBlade=3 Beta34=20 UseBeta34Flag=1 Feather=0 Rotate=0 Precone=0 ReverseFlag=0 FoldAngle=0 PropMode=2 AF=151.538 CLi=0.538798 Chord=0.177656 Solidity=0.169649 ConstructXoC=0.5 FeatherAxisXoC=0.5 FeatherOffsetXoC=0
  cross sections:
    n  RadiusFrac  shape
    0  0.2         ellipse Ellipse_Height=0.045 Ellipse_Width=0.09
    1  0.4         NACA 16-series Chord=0.187031 IdealCl=0.7 ThickChord=0.144074
    2  1           NACA 16-series Chord=0.14625 IdealCl=0.2 ThickChord=0.03
  blade curves as in "lift_R0_fwd"

Auxiliary "lift_R1_fwd_tippath", child of "lift_R1_fwd"
  location (X Y Z) 1.87278 4.96625 0.95, rotation 0 90 0; relative location 0 0 0, rotation 0 0 0
  bounding box size 2.25 2.25 0.582343
  Design: AutoDiam=1 AuxiliaryGeomType=0 BladeLength=1 BladeRootRadius=0.1 BogieTheta=0 CCEMainGearOffset=0 CCEUnits=3 CGRadius=1 ContactPt1_ClearanceMode=0 ContactPt1_GearMode=0 ContactPt1_Isymm=0 ContactPt1_KRetract=0 ContactPt1_SuspensionMode=0 ContactPt1_TireMode=0 ContactPt2_Isymm=0 ContactPt2_SuspensionMode=0 ContactPt2_TireMode=0 ContactPt3_Isymm=0 ContactPt3_SuspensionMode=0 ContactPt3_TireMode=0 Diameter=2.25 DiskRadius=2 FlapRadiusFract=0 FragLength=1 ReleaseAngle=0 RollTheta=0 RootLength=0 RootOffset=0.5 RotDir=0 RotorFragmentMode=0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

Propeller "lift_R1_aft"
  location (X Y Z) 6.51935 4.96625 0.95, rotation 0 90 0
  bounding box size 2.25 2.25 0
  Design: Diameter=2.25 NumBlade=3 Beta34=20 UseBeta34Flag=1 Feather=0 Rotate=0 Precone=0 ReverseFlag=0 FoldAngle=0 PropMode=2 AF=151.538 CLi=0.538798 Chord=0.177656 Solidity=0.169649 ConstructXoC=0.5 FeatherAxisXoC=0.5 FeatherOffsetXoC=0
  cross sections:
    n  RadiusFrac  shape
    0  0.2         ellipse Ellipse_Height=0.045 Ellipse_Width=0.09
    1  0.4         NACA 16-series Chord=0.187031 IdealCl=0.7 ThickChord=0.144074
    2  1           NACA 16-series Chord=0.14625 IdealCl=0.2 ThickChord=0.03
  blade curves as in "lift_R0_fwd"

Auxiliary "lift_R1_aft_tippath", child of "lift_R1_aft"
  location (X Y Z) 6.51935 4.96625 0.95, rotation 0 90 0; relative location 0 0 0, rotation 0 0 0
  bounding box size 2.25 2.25 0.582343
  Design: AutoDiam=1 AuxiliaryGeomType=0 BladeLength=1 BladeRootRadius=0.1 BogieTheta=0 CCEMainGearOffset=0 CCEUnits=3 CGRadius=1 ContactPt1_ClearanceMode=0 ContactPt1_GearMode=0 ContactPt1_Isymm=0 ContactPt1_KRetract=0 ContactPt1_SuspensionMode=0 ContactPt1_TireMode=0 ContactPt2_Isymm=0 ContactPt2_SuspensionMode=0 ContactPt2_TireMode=0 ContactPt3_Isymm=0 ContactPt3_SuspensionMode=0 ContactPt3_TireMode=0 Diameter=2.25 DiskRadius=2 FlapRadiusFract=0 FragLength=1 ReleaseAngle=0 RollTheta=0 RootLength=0 RootOffset=0.5 RotDir=0 RotorFragmentMode=0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

Propeller "lift_R2_fwd"
  location (X Y Z) 1.87278 2.125 0.95, rotation 0 90 0
  bounding box size 2.25 2.25 0
  Design: Diameter=2.25 NumBlade=3 Beta34=20 UseBeta34Flag=1 Feather=0 Rotate=0 Precone=0 ReverseFlag=0 FoldAngle=0 PropMode=2 AF=151.538 CLi=0.538798 Chord=0.177656 Solidity=0.169649 ConstructXoC=0.5 FeatherAxisXoC=0.5 FeatherOffsetXoC=0
  cross sections:
    n  RadiusFrac  shape
    0  0.2         ellipse Ellipse_Height=0.045 Ellipse_Width=0.09
    1  0.4         NACA 16-series Chord=0.187031 IdealCl=0.7 ThickChord=0.144074
    2  1           NACA 16-series Chord=0.14625 IdealCl=0.2 ThickChord=0.03
  blade curves as in "lift_R0_fwd"

Auxiliary "lift_R2_fwd_tippath", child of "lift_R2_fwd"
  location (X Y Z) 1.87278 2.125 0.95, rotation 0 90 0; relative location 0 0 0, rotation 0 0 0
  bounding box size 2.25 2.25 0.582343
  Design: AutoDiam=1 AuxiliaryGeomType=0 BladeLength=1 BladeRootRadius=0.1 BogieTheta=0 CCEMainGearOffset=0 CCEUnits=3 CGRadius=1 ContactPt1_ClearanceMode=0 ContactPt1_GearMode=0 ContactPt1_Isymm=0 ContactPt1_KRetract=0 ContactPt1_SuspensionMode=0 ContactPt1_TireMode=0 ContactPt2_Isymm=0 ContactPt2_SuspensionMode=0 ContactPt2_TireMode=0 ContactPt3_Isymm=0 ContactPt3_SuspensionMode=0 ContactPt3_TireMode=0 Diameter=2.25 DiskRadius=2 FlapRadiusFract=0 FragLength=1 ReleaseAngle=0 RollTheta=0 RootLength=0 RootOffset=0.5 RotDir=0 RotorFragmentMode=0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

Propeller "lift_R2_aft"
  location (X Y Z) 6.51935 2.125 0.95, rotation 0 90 0
  bounding box size 2.25 2.25 0
  Design: Diameter=2.25 NumBlade=3 Beta34=20 UseBeta34Flag=1 Feather=0 Rotate=0 Precone=0 ReverseFlag=0 FoldAngle=0 PropMode=2 AF=151.538 CLi=0.538798 Chord=0.177656 Solidity=0.169649 ConstructXoC=0.5 FeatherAxisXoC=0.5 FeatherOffsetXoC=0
  cross sections:
    n  RadiusFrac  shape
    0  0.2         ellipse Ellipse_Height=0.045 Ellipse_Width=0.09
    1  0.4         NACA 16-series Chord=0.187031 IdealCl=0.7 ThickChord=0.144074
    2  1           NACA 16-series Chord=0.14625 IdealCl=0.2 ThickChord=0.03
  blade curves as in "lift_R0_fwd"

Auxiliary "lift_R2_aft_tippath", child of "lift_R2_aft"
  location (X Y Z) 6.51935 2.125 0.95, rotation 0 90 0; relative location 0 0 0, rotation 0 0 0
  bounding box size 2.25 2.25 0.582343
  Design: AutoDiam=1 AuxiliaryGeomType=0 BladeLength=1 BladeRootRadius=0.1 BogieTheta=0 CCEMainGearOffset=0 CCEUnits=3 CGRadius=1 ContactPt1_ClearanceMode=0 ContactPt1_GearMode=0 ContactPt1_Isymm=0 ContactPt1_KRetract=0 ContactPt1_SuspensionMode=0 ContactPt1_TireMode=0 ContactPt2_Isymm=0 ContactPt2_SuspensionMode=0 ContactPt2_TireMode=0 ContactPt3_Isymm=0 ContactPt3_SuspensionMode=0 ContactPt3_TireMode=0 Diameter=2.25 DiskRadius=2 FlapRadiusFract=0 FragLength=1 ReleaseAngle=0 RollTheta=0 RootLength=0 RootOffset=0.5 RotDir=0 RotorFragmentMode=0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

Propeller "lift_L0_fwd"
  location (X Y Z) 1.87278 -7.8075 0.95, rotation 0 90 0
  bounding box size 2.25 2.25 0
  Design: Diameter=2.25 NumBlade=3 Beta34=20 UseBeta34Flag=1 Feather=0 Rotate=0 Precone=0 ReverseFlag=0 FoldAngle=0 PropMode=2 AF=151.538 CLi=0.538798 Chord=0.177656 Solidity=0.169649 ConstructXoC=0.5 FeatherAxisXoC=0.5 FeatherOffsetXoC=0
  cross sections:
    n  RadiusFrac  shape
    0  0.2         ellipse Ellipse_Height=0.045 Ellipse_Width=0.09
    1  0.4         NACA 16-series Chord=0.187031 IdealCl=0.7 ThickChord=0.144074
    2  1           NACA 16-series Chord=0.14625 IdealCl=0.2 ThickChord=0.03
  blade curves as in "lift_R0_fwd"

Auxiliary "lift_L0_fwd_tippath", child of "lift_L0_fwd"
  location (X Y Z) 1.87278 -7.8075 0.95, rotation 0 90 0; relative location 0 0 0, rotation 0 0 0
  Design: AutoDiam=1 AuxiliaryGeomType=0 BladeLength=1 BladeRootRadius=0.1 BogieTheta=0 CCEMainGearOffset=0 CCEUnits=3 CGRadius=1 ContactPt1_ClearanceMode=0 ContactPt1_GearMode=0 ContactPt1_Isymm=0 ContactPt1_KRetract=0 ContactPt1_SuspensionMode=0 ContactPt1_TireMode=0 ContactPt2_Isymm=0 ContactPt2_SuspensionMode=0 ContactPt2_TireMode=0 ContactPt3_Isymm=0 ContactPt3_SuspensionMode=0 ContactPt3_TireMode=0 Diameter=30 DiskRadius=2 FlapRadiusFract=0 FragLength=1 ReleaseAngle=0 RollTheta=0 RootLength=0 RootOffset=0.5 RotDir=0 RotorFragmentMode=0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

Propeller "lift_L0_aft"
  location (X Y Z) 6.51935 -7.8075 0.95, rotation 0 90 0
  bounding box size 2.25 2.25 0
  Design: Diameter=2.25 NumBlade=3 Beta34=20 UseBeta34Flag=1 Feather=0 Rotate=0 Precone=0 ReverseFlag=0 FoldAngle=0 PropMode=2 AF=151.538 CLi=0.538798 Chord=0.177656 Solidity=0.169649 ConstructXoC=0.5 FeatherAxisXoC=0.5 FeatherOffsetXoC=0
  cross sections:
    n  RadiusFrac  shape
    0  0.2         ellipse Ellipse_Height=0.045 Ellipse_Width=0.09
    1  0.4         NACA 16-series Chord=0.187031 IdealCl=0.7 ThickChord=0.144074
    2  1           NACA 16-series Chord=0.14625 IdealCl=0.2 ThickChord=0.03
  blade curves as in "lift_R0_fwd"

Auxiliary "lift_L0_aft_tippath", child of "lift_L0_aft"
  location (X Y Z) 6.51935 -7.8075 0.95, rotation 0 90 0; relative location 0 0 0, rotation 0 0 0
  Design: AutoDiam=1 AuxiliaryGeomType=0 BladeLength=1 BladeRootRadius=0.1 BogieTheta=0 CCEMainGearOffset=0 CCEUnits=3 CGRadius=1 ContactPt1_ClearanceMode=0 ContactPt1_GearMode=0 ContactPt1_Isymm=0 ContactPt1_KRetract=0 ContactPt1_SuspensionMode=0 ContactPt1_TireMode=0 ContactPt2_Isymm=0 ContactPt2_SuspensionMode=0 ContactPt2_TireMode=0 ContactPt3_Isymm=0 ContactPt3_SuspensionMode=0 ContactPt3_TireMode=0 Diameter=30 DiskRadius=2 FlapRadiusFract=0 FragLength=1 ReleaseAngle=0 RollTheta=0 RootLength=0 RootOffset=0.5 RotDir=0 RotorFragmentMode=0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

Propeller "lift_L1_fwd"
  location (X Y Z) 1.87278 -4.96625 0.95, rotation 0 90 0
  bounding box size 2.25 2.25 0
  Design: Diameter=2.25 NumBlade=3 Beta34=20 UseBeta34Flag=1 Feather=0 Rotate=0 Precone=0 ReverseFlag=0 FoldAngle=0 PropMode=2 AF=151.538 CLi=0.538798 Chord=0.177656 Solidity=0.169649 ConstructXoC=0.5 FeatherAxisXoC=0.5 FeatherOffsetXoC=0
  cross sections:
    n  RadiusFrac  shape
    0  0.2         ellipse Ellipse_Height=0.045 Ellipse_Width=0.09
    1  0.4         NACA 16-series Chord=0.187031 IdealCl=0.7 ThickChord=0.144074
    2  1           NACA 16-series Chord=0.14625 IdealCl=0.2 ThickChord=0.03
  blade curves as in "lift_R0_fwd"

Auxiliary "lift_L1_fwd_tippath", child of "lift_L1_fwd"
  location (X Y Z) 1.87278 -4.96625 0.95, rotation 0 90 0; relative location 0 0 0, rotation 0 0 0
  Design: AutoDiam=1 AuxiliaryGeomType=0 BladeLength=1 BladeRootRadius=0.1 BogieTheta=0 CCEMainGearOffset=0 CCEUnits=3 CGRadius=1 ContactPt1_ClearanceMode=0 ContactPt1_GearMode=0 ContactPt1_Isymm=0 ContactPt1_KRetract=0 ContactPt1_SuspensionMode=0 ContactPt1_TireMode=0 ContactPt2_Isymm=0 ContactPt2_SuspensionMode=0 ContactPt2_TireMode=0 ContactPt3_Isymm=0 ContactPt3_SuspensionMode=0 ContactPt3_TireMode=0 Diameter=30 DiskRadius=2 FlapRadiusFract=0 FragLength=1 ReleaseAngle=0 RollTheta=0 RootLength=0 RootOffset=0.5 RotDir=0 RotorFragmentMode=0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

Propeller "lift_L1_aft"
  location (X Y Z) 6.51935 -4.96625 0.95, rotation 0 90 0
  bounding box size 2.25 2.25 0
  Design: Diameter=2.25 NumBlade=3 Beta34=20 UseBeta34Flag=1 Feather=0 Rotate=0 Precone=0 ReverseFlag=0 FoldAngle=0 PropMode=2 AF=151.538 CLi=0.538798 Chord=0.177656 Solidity=0.169649 ConstructXoC=0.5 FeatherAxisXoC=0.5 FeatherOffsetXoC=0
  cross sections:
    n  RadiusFrac  shape
    0  0.2         ellipse Ellipse_Height=0.045 Ellipse_Width=0.09
    1  0.4         NACA 16-series Chord=0.187031 IdealCl=0.7 ThickChord=0.144074
    2  1           NACA 16-series Chord=0.14625 IdealCl=0.2 ThickChord=0.03
  blade curves as in "lift_R0_fwd"

Auxiliary "lift_L1_aft_tippath", child of "lift_L1_aft"
  location (X Y Z) 6.51935 -4.96625 0.95, rotation 0 90 0; relative location 0 0 0, rotation 0 0 0
  Design: AutoDiam=1 AuxiliaryGeomType=0 BladeLength=1 BladeRootRadius=0.1 BogieTheta=0 CCEMainGearOffset=0 CCEUnits=3 CGRadius=1 ContactPt1_ClearanceMode=0 ContactPt1_GearMode=0 ContactPt1_Isymm=0 ContactPt1_KRetract=0 ContactPt1_SuspensionMode=0 ContactPt1_TireMode=0 ContactPt2_Isymm=0 ContactPt2_SuspensionMode=0 ContactPt2_TireMode=0 ContactPt3_Isymm=0 ContactPt3_SuspensionMode=0 ContactPt3_TireMode=0 Diameter=30 DiskRadius=2 FlapRadiusFract=0 FragLength=1 ReleaseAngle=0 RollTheta=0 RootLength=0 RootOffset=0.5 RotDir=0 RotorFragmentMode=0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

Propeller "lift_L2_fwd"
  location (X Y Z) 1.87278 -2.125 0.95, rotation 0 90 0
  bounding box size 2.25 2.25 0
  Design: Diameter=2.25 NumBlade=3 Beta34=20 UseBeta34Flag=1 Feather=0 Rotate=0 Precone=0 ReverseFlag=0 FoldAngle=0 PropMode=2 AF=151.538 CLi=0.538798 Chord=0.177656 Solidity=0.169649 ConstructXoC=0.5 FeatherAxisXoC=0.5 FeatherOffsetXoC=0
  cross sections:
    n  RadiusFrac  shape
    0  0.2         ellipse Ellipse_Height=0.045 Ellipse_Width=0.09
    1  0.4         NACA 16-series Chord=0.187031 IdealCl=0.7 ThickChord=0.144074
    2  1           NACA 16-series Chord=0.14625 IdealCl=0.2 ThickChord=0.03
  blade curves as in "lift_R0_fwd"

Auxiliary "lift_L2_fwd_tippath", child of "lift_L2_fwd"
  location (X Y Z) 1.87278 -2.125 0.95, rotation 0 90 0; relative location 0 0 0, rotation 0 0 0
  Design: AutoDiam=1 AuxiliaryGeomType=0 BladeLength=1 BladeRootRadius=0.1 BogieTheta=0 CCEMainGearOffset=0 CCEUnits=3 CGRadius=1 ContactPt1_ClearanceMode=0 ContactPt1_GearMode=0 ContactPt1_Isymm=0 ContactPt1_KRetract=0 ContactPt1_SuspensionMode=0 ContactPt1_TireMode=0 ContactPt2_Isymm=0 ContactPt2_SuspensionMode=0 ContactPt2_TireMode=0 ContactPt3_Isymm=0 ContactPt3_SuspensionMode=0 ContactPt3_TireMode=0 Diameter=30 DiskRadius=2 FlapRadiusFract=0 FragLength=1 ReleaseAngle=0 RollTheta=0 RootLength=0 RootOffset=0.5 RotDir=0 RotorFragmentMode=0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

Propeller "lift_L2_aft"
  location (X Y Z) 6.51935 -2.125 0.95, rotation 0 90 0
  bounding box size 2.25 2.25 0
  Design: Diameter=2.25 NumBlade=3 Beta34=20 UseBeta34Flag=1 Feather=0 Rotate=0 Precone=0 ReverseFlag=0 FoldAngle=0 PropMode=2 AF=151.538 CLi=0.538798 Chord=0.177656 Solidity=0.169649 ConstructXoC=0.5 FeatherAxisXoC=0.5 FeatherOffsetXoC=0
  cross sections:
    n  RadiusFrac  shape
    0  0.2         ellipse Ellipse_Height=0.045 Ellipse_Width=0.09
    1  0.4         NACA 16-series Chord=0.187031 IdealCl=0.7 ThickChord=0.144074
    2  1           NACA 16-series Chord=0.14625 IdealCl=0.2 ThickChord=0.03
  blade curves as in "lift_R0_fwd"

Auxiliary "lift_L2_aft_tippath", child of "lift_L2_aft"
  location (X Y Z) 6.51935 -2.125 0.95, rotation 0 90 0; relative location 0 0 0, rotation 0 0 0
  Design: AutoDiam=1 AuxiliaryGeomType=0 BladeLength=1 BladeRootRadius=0.1 BogieTheta=0 CCEMainGearOffset=0 CCEUnits=3 CGRadius=1 ContactPt1_ClearanceMode=0 ContactPt1_GearMode=0 ContactPt1_Isymm=0 ContactPt1_KRetract=0 ContactPt1_SuspensionMode=0 ContactPt1_TireMode=0 ContactPt2_Isymm=0 ContactPt2_SuspensionMode=0 ContactPt2_TireMode=0 ContactPt3_Isymm=0 ContactPt3_SuspensionMode=0 ContactPt3_TireMode=0 Diameter=30 DiskRadius=2 FlapRadiusFract=0 FragLength=1 ReleaseAngle=0 RollTheta=0 RootLength=0 RootOffset=0.5 RotDir=0 RotorFragmentMode=0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
